# Beregning af 0-punkter
R_out := 8.4 Ω
D := 0.447
N_ps := 1
L_p := 57.7 μH
f_s := 100 kHz
R_ESR := ((15 Ω*10^-3)^-1*4)^-1 = 3.75 Ω*10^-3
C_out := 56 μF*4 = 224 μF
f_RHPZ := R_out*(1 - D)^2*N_ps^2/(2*π*L_p*D) = 15.8514 kHz
ω_RHPZ := 2*π*f_RHPZ
f_ESRz := 1/(2*π*R_ESR*C_out) = 189.47 kHz
ω_ESRz := 2*π*f_ESRz
f_BW := f_RHPZ/3 = 5.28378 kHz
V_inmin := 26 V
V_out := 21 V
τ_L := 2*L_p*f_s/(R_out*N_ps) = 1.37381
M := V_out*N_ps/V_inmin = 0.807692
# Open-loop gain:
A_CS := 1.65
R_CS := 0.167 Ω
G_o := R_out*N_ps/(R_CS*A_CS)*1/((1 - D)^2/τ_L + (2*M) + 1) = 10.7416
20*log(G_o) = 20.6214
# Beregning af poler
f_p1 := ((1 - D)^3/τ_L + 1 + D)/(2*π*R_out*C_out) = 132.807 Hz
ω_p1 := 2*π*f_p1
f_p2 := f_s/2 = 50 kHz
ω_p2 := 2*π*f_p2
s := 0
H_0 := G_o*(1 + s/ω_ESRz)*(1 - s/ω_RHPZ)/(1 + s/ω_p1)*1/(1 + s/ω_p2 + s^2/ω_p2^2) → 10.7415992419
1/(2*π*10 kΩ*50 F*10^-9) = 318.31 1/s
