V_out21 := 21 V
V_inmax := 100 V
V_inmin := 26 V
V_out15 := 15 V
N_ps := 1
L := 51.84 μH
f_s := 100 kHz
T := 1/f_s = 1e-5 s
V_D := 0.7 V
D_max21 := (V_out21 + V_D)/(V_inmin + V_out21 + V_D) = 0.454927
D_max15 := (V_out15 + V_D)/(V_inmin + V_out21 + V_D) = 0.32914
# Diode krav - Krav til spænding og strøm samt effekttab, ses både med udgang på 5A og 2.5A
I_out21 := 2.5 A
I_out15 := 5 A
V_break := V_out21 + V_inmax = 121 V
I_D1 := I_out21/(1 - D_max21) = 4.58654 A
I_D1 := I_out15/(1 - D_max15) = 7.45312 A
P_D1 := I_out21*V_D = 1.75 W
P_D1 := I_out15*V_D = 3.5 W
# MOSFET krav (21V, 2.5A) - Spændingskrav samt tab med bestemt MOSFET for at give overblik (IRFS4620PbF)
V_ds := (V_inmax + N_ps*(V_out21 + V_D))*1.3 = 158.21 V
R_ds := 77.5 Ω*10^-3
t_r := 22.4 ns
t_f := 14.8 ns
I_ripple21 := V_inmin*D_max21/(L*f_s) = 2.28165 A
I_pk21 := V_out21*I_out21/(V_inmin*D_max21) + I_ripple21/2 = 5.57941 A
I_pkavg21 := I_out21/(1 - D_max21) = 4.58654 A
I_RMSp21 := sqrt(D_max21*I_pkavg21^2) = 3.09354 A
P_cond := I_RMSp21^2*R_ds = 0.741674 W
P_sw := 1/2*I_pk21*V_inmax*(t_r + t_f)/T = 1.03777 W
# MOSFET krav (15V, 5A) samme MOSFET
V_ds := (V_inmax + N_ps*(V_out15 + V_D))*1.3 = 150.41 V
R_ds := 77.5 Ω*10^-3
t_r := 22.4 ns
t_f := 14.8 ns
I_pkavg15 := I_out15/(1 - D_max15) = 7.45312 A
I_RMSp15 := sqrt(D_max15*I_pkavg15^2) = 4.27591 A
I_RMSs15 := sqrt((1 - D_max15)*I_pkavg15^2) = 6.10456 A
I_ripple15 := V_inmin*D_max15/(L*f_s) = 1.65078 A
I_pk15 := V_out15*I_out15/(V_inmin*D_max15) + I_ripple15/2 = 9.58948 A
P_cond := I_RMSp15^2*R_ds = 1.41697 W
P_sw := 1/2*I_pk15*V_inmax*(t_r + t_f)/T = 1.78364 W
I_RMSp15 := sqrt((1 - D_max15)*I_pkavg15^2) = 6.10456 A
# Beregning af kernetab i transformator
A_0 := 63 mm^2
N := 18
V_e := 2440 mm^3
# Udregnet B felt
ΔB := L*I_ripple21/(N*A_0) = 104.304 T*10^-3
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B := ΔB/2 = 52.1521 T*10^-3
# Gå man ind på kurven omkring 50mT ved 100kHz, skærer omkring 15
P_V := 15 kW/m^3
P := P_V*V_e = 36.6 mW
# Dette giver ikke i nærheden af kernetabet vi fandt frem til ved pspice på omkring 350mT.. Kan det skyldes at kurven er for 100grader, eller er det en forkert måde at finde kernetabet på?
